// COMSOL Multiphysics 4.3 (Build: 151) model "neuron43.mph"
// Outline of the model tree

Parameters
  D = 0.01

Variables
  var1 "Variables 1"
    rdme_sdlevel = 2
  var2 "Variables 2" on domains 1
    rdme_sd = 1
  var3 "Variables 3" on boundaries 1-93
    rdme_sd = 2

Geometry
  geom1 "Geometry 1" (3D, length unit m)
    fin: Finalize "Form Union"

Physics
  chdi: DilutedSpecies "Transport of Diluted Species" on all domains
    dependent variable V = {V, Vf, Vd}
    Convection.Convection = 0
    MassConsistentStabilization.massStreamlineDiffusion = 0
    MassConsistentStabilization.massCrosswindDiffusion = 0
    cdm1: ConvectionDiffusion "Diffusion" (default) | D_0 = D; D_1 = 0; D_2 = 0
    nflx1: NoFlux (default)
    init1: init "Initial Values 1" (default)
    nflx2: NoFlux on boundaries 1-93 | species = {1, 1, 1}; allSpecies = ApplyFor

Mesh
  mesh1 "Mesh 1"
    obj: MeshObject | filename = $FILENAME$_mesh1_obj.mphbin

Studies
  std1 "Study 1"
    time: Transient "Time Dependent" | tlist = range(0,0.1,1)

Solver configurations
  sol1 "Solver 1" (study std1)
    v1: Variables "Dependent Variables 1"
    t1: Time "Time-Dependent Solver 1" | atolglobalmethod = unscaled
      i1: Iterative | linsolver = cg; rhob = 4000000
        mg1: Multigrid | prefun = amg

Datasets
  dset1: Solution | solution = sol1

Plots
  pg2: PlotGroup3D "Concentration (chdi)" | data = dset1
    slc1: Slice | expr = V; genpoints = {{0, 0, 0}, {1, 0, 0}, {0, 1, 0}}
  pg3: PlotGroup3D "Concentration (chdi) 1" | data = dset1
    surf1: Surface | expr = V