// COMSOL Multiphysics 4.2a (Build: 166) model "result_donut.mph"
// Outline of the model tree

Variables
  var1 "Variables 1"
    Gradient = 2 + 1*z
    rdme_sdlevel = 1
  var2 "Variables 2" on domains 1
    rdme_sd = 1

Geometry
  geom1 "Geometry 1" (3D, length unit m)
    tor1: Torus | rmaj = 2; rmin = 1
    fin: Finalize "Form Union"

Physics
  chdi: DilutedSpecies "Transport of Diluted Species" on all domains
    dependent variable R = {R, RL, G, Ga, Gbg, Gd, R7, R8, R9, R10, R11, R12}
    Convection.Convection = 0
    MassConsistentStabilization.massStreamlineDiffusion = 0
    MassConsistentStabilization.massCrosswindDiffusion = 0
    cdm1: ConvectionDiffusion "Diffusion" (default)
      D_0 = 0.001
      D_1 = 0.001
      D_2 = 0.001
      D_3 = 0.001
      D_4 = 0.001
      D_5 = 0.001
      D_9 = 1e-9[m^2/s]
    nflx1: NoFlux (default)
    init1: init "Initial Values 1" (default) | Ga = 1
    nflx2: NoFlux on no boundaries | allSpecies = ApplyFor; species = {1, 1, 1, 1, 1, 1, 1, 1, 1, 1, 1, 1}

Mesh
  mesh1 "Mesh 1" (physics-controlled)
    size: MeshSizeDefault | hauto = 5

Studies
  std1 "Study 1"
    time: Transient "Time Dependent" | tlist = range(0,0.1,1)

Solver configurations
  sol1 "Solver 1" (study std1)
    v1: Variables "Dependent Variables 1"
    t1: Time "Time-Dependent Solver 1"
      tlist = range(0,0.1,1)
      atolglobalmethod = scaled
      atolglobal = 0.0010
      maxorder = 2
      fc1: FullyCoupled | linsolver = i1; maxiter = 5; jtech = once
      i1: Iterative | linsolver = gmres; itrestart = 50; prefuntype = left; rhob = 20
        mg1: Multigrid | prefun = gmg; mcasegen = any

Datasets
  dset1: Solution | solution = sol1

Plots
  pg1: PlotGroup3D "Concentration (chdi)" | data = dset1
    slc1: Slice | expr = Gbg; genpoints = {{0, 0, 0}, {1, 0, 0}, {0, 1, 0}}
  pg2: PlotGroup3D "Concentration (chdi) 1" | data = dset1
    surf1: Surface | expr = Gbg