// SBML level 2 version 4

model model01()
  // mincde

  // Compartments:
  compartment c_cyt = 1 volume; c_cyt is "cytosol";
  compartment c_mem = 1; c_mem is "Membrane";

  // Species:
  substanceOnly species s_mind_c_atp_mem in c_mem = 0; s_mind_c_atp_mem is "MinD_c_atp";
  substanceOnly species s_mind_c_atp_cyt in c_cyt = 0; s_mind_c_atp_cyt is "MinD_c_atp";
  substanceOnly species s_mind_c_adp_mem in c_mem = 0; s_mind_c_adp_mem is "MinD_c_adp";
  substanceOnly species s_mind_c_adp_cyt in c_cyt = 1040; s_mind_c_adp_cyt is "Mind_c_adp";
  substanceOnly species s_mind_e_cyt in c_cyt = 4002; s_mind_e_cyt is "MinD_e";
  substanceOnly species s_mind_e_mem in c_mem = 0; s_mind_e_mem is "Mind_E";
  substanceOnly species s_minde_mem in c_mem = 0; s_minde_mem is "MinDE";
  substanceOnly species s_minde_cyt in c_cyt = 0; s_minde_cyt is "MinDE";
  substanceOnly species s_mind_m_mem in c_mem = 0; s_mind_m_mem is "MinD_m";
  substanceOnly species s_mind_m_cyt in c_cyt; s_mind_m_cyt is "MinD_m";

  // Parameters:
  na = 6.022e23; na is "NA";

  // Reactions:
  rfun1: s_mind_c_atp_mem => s_mind_m_mem; kd*s_mind_c_atp_mem/h;
    kd = 1.25e-8;
  rfun2: s_mind_m_mem + s_mind_c_atp_mem => 2 s_mind_m_mem; kdd*s_mind_c_atp_mem*s_mind_m_mem/(1000*na*c_mem);
    kdd = 9e6;
  rfun3: s_mind_e_mem + s_mind_m_mem => s_minde_mem; kde*s_mind_m_mem*s_mind_e_mem/(1000*na*c_mem);
    kde = 5.56e7;
  rfun4: s_minde_mem => s_mind_e_mem + s_mind_c_adp_mem; ke*s_minde_mem;
    ke = 0.7;
  rfun5_mem: s_mind_c_adp_mem => s_mind_c_atp_mem; rfun5_mem_k_adp*s_mind_c_adp_mem;
    rfun5_mem_k_adp = 1;
  rfun5_cyt: s_mind_c_adp_cyt => s_mind_c_atp_cyt; rfun5_cyt_k_adp*s_mind_c_adp_cyt;
    rfun5_cyt_k_adp = 1;
end
